ORIGIN := 1
n := 3
i := 1 .. n
j := 1 .. n
x[:, i] := rnorm(10000, 0, 1)
Dx[i, j] := cvar(x[:, i], x[:, j])
D := [1, 0, 0.7; 0, 1, 0.7; 0.7, 0.7, 1]
B[i, j] := 1
Given
B*Dx*transpose(B) == D
B = [1, 1, 1; 1, 1, 1; 1, 1, 1]
B := Find(B)
xy := x*transpose(B)
B = [-0.161065, 0.730203, 0.66692; 0.985961, 0.174299, 0.0422734; 0.591149, 0.541555, 0.602308]
xy =  # no stored result
